// SBML level 3 version 2

model biocrnpyler_166768()
  // model units - substance: mole, time: sec, volume: litre, area: square_metre, length: metre, extent: mole

  // Compartments:
  compartment default = 1e-6;

  // Species:
  species dna_D1 in default = 1;  // substance in umol
  species rna_m1 in default = 0;  // substance in umol
  species protein_A1 in default = 0;  // substance in umol
  species protein_R1 in default = 0;  // substance in umol
  species complex_dna_D1_protein_A1_ in default = 0;  // substance in umol
  species dna_D2 in default = 1;  // substance in umol
  species rna_m2 in default = 0;  // substance in umol
  species protein_A2 in default = 0;  // substance in umol
  species protein_R2 in default = 0;  // substance in umol
  species complex_dna_D2_protein_A2_ in default = 0;  // substance in umol
  species complex_dna_D1_protein_R2_ in default = 0;  // substance in umol
  species complex_dna_D2_protein_R1_ in default = 0;  // substance in umol

  // Parameters:
  ktx_p1_leak_transcription = 0.25 per_hour;
  kb_p1_A1_one_step_cooperative_binding = 1 per_hour;
  ku_p1_A1_one_step_cooperative_binding = 1 per_hour;
  ktx_p1_A1_transcription = 2 per_hour;
  ktl_utr1_simple_translation = 5 per_hour;
  ktx_p2_leak_transcription = 0.25 per_hour;
  kb_p2_A2_one_step_cooperative_binding = 1 per_hour;
  ku_p2_A2_one_step_cooperative_binding = 1 per_hour;
  ktx_p2_A2_transcription = 2 per_hour;
  kb_R2_one_step_cooperative_binding = 1 per_hour;
  ku_R2_one_step_cooperative_binding = 1 per_hour;
  kb_R1_one_step_cooperative_binding = 1 per_hour;
  ku_R1_one_step_cooperative_binding = 1 per_hour;
  kdil_protein_R2_protein_degradation = 1 per_hour;
  kdil_protein_A2_protein_degradation = 1 per_hour;
  kdil_protein_R1_protein_degradation = 1 per_hour;
  kdil_protein_A1_protein_degradation = 1 per_hour;
  kdil_rna_m1_rna_degradation = 1 per_hour;
  kdil_rna_m2_rna_degradation = 1 per_hour;

  // Reactions:
  r0: dna_D1 => dna_D1 + rna_m1; ktx_p1_leak_transcription*dna_D1;
  r1: protein_A1 + dna_D1 => complex_dna_D1_protein_A1_; kb_p1_A1_one_step_cooperative_binding*protein_A1*dna_D1;
  r1rev: complex_dna_D1_protein_A1_ => protein_A1 + dna_D1; ku_p1_A1_one_step_cooperative_binding*complex_dna_D1_protein_A1_;
  r2: complex_dna_D1_protein_A1_ => complex_dna_D1_protein_A1_ + rna_m1; ktx_p1_A1_transcription*complex_dna_D1_protein_A1_;
  r3: rna_m1 => rna_m1 + protein_A1 + protein_R1; ktl_utr1_simple_translation*rna_m1;
  r4: dna_D2 => dna_D2 + rna_m2; ktx_p2_leak_transcription*dna_D2;
  r5: protein_A2 + dna_D2 => complex_dna_D2_protein_A2_; kb_p2_A2_one_step_cooperative_binding*protein_A2*dna_D2;
  r5rev: complex_dna_D2_protein_A2_ => protein_A2 + dna_D2; ku_p2_A2_one_step_cooperative_binding*complex_dna_D2_protein_A2_;
  r6: complex_dna_D2_protein_A2_ => complex_dna_D2_protein_A2_ + rna_m2; ktx_p2_A2_transcription*complex_dna_D2_protein_A2_;
  r7: rna_m2 => rna_m2 + protein_A2 + protein_R2; ktl_utr1_simple_translation*rna_m2;
  r8: protein_R2 + dna_D1 => complex_dna_D1_protein_R2_; kb_R2_one_step_cooperative_binding*protein_R2*dna_D1;
  r8rev: complex_dna_D1_protein_R2_ => protein_R2 + dna_D1; ku_R2_one_step_cooperative_binding*complex_dna_D1_protein_R2_;
  r9: protein_R1 + dna_D2 => complex_dna_D2_protein_R1_; kb_R1_one_step_cooperative_binding*protein_R1*dna_D2;
  r9rev: complex_dna_D2_protein_R1_ => protein_R1 + dna_D2; ku_R1_one_step_cooperative_binding*complex_dna_D2_protein_R1_;
  r10: protein_R2 => ; kdil_protein_R2_protein_degradation*protein_R2;
  r11: protein_A2 => ; kdil_protein_A2_protein_degradation*protein_A2;
  r12: protein_R1 => ; kdil_protein_R1_protein_degradation*protein_R1;
  r13: protein_A1 => ; kdil_protein_A1_protein_degradation*protein_A1;
  r14: rna_m1 => ; kdil_rna_m1_rna_degradation*rna_m1;
  r15: rna_m2 => ; kdil_rna_m2_rna_degradation*rna_m2;

  // Unit definitions:
  unit square_metre = metre^2;
  unit sec = second;
  unit umol = 1e-6 mole;
  unit per_hour = 1 / (2.777778e-4 second);
end
